# Example 5
# 3d Lennard-Jones melt in periodic box NVT
# Start at T=3 and implement NVT at T=1.7

# set name for this simulation
variable NAME index example5 # name style value

# set log file name
log ${NAME}.log

# configure and initialize system
units lj
atom_style atomic
pair_style lj/cut 2.5 # style args(=cutoff)
boundary p p p # x y z (p = periodic boundary conditions)

lattice fcc 0.8442 # style scale(=reduced_density)
region MYBOX block 0 10 0 10 0 10 # ID style args(=xlo,xhi,ylo,yhi,zlo,zhi)
create_box 1 MYBOX # number_of_atom_types region_ID

create_atoms 1 box # atom_type style args

mass 1 1.0 # atom_type mass
velocity all create 3.0 87287 # group_ID style args(=temp,seed)

# set forcefield parameters
pair_coeff 1 1 1.0 1.0 2.5 # atom_i atom_j args(=epsilon,sigma,cutoff)

# implement long-range pair modifications
#pair_modify shift yes
pair_modify tail yes

# configure neighbor lists
neighbor 0.3 bin
neigh_modify every 20 delay 0 check no

# configure integrator and thermostat - Nose-Hoover NVT
fix TEMP all nvt temp 1.7 1.7 0.3 # T1 T2 Tdamp (has integrator)
timestep 0.003 # The default timestep size is 0.005 for LJ units.

# configure output of atom-specific trajectory data (e.g. coordinates)
dump DUMP all custom 50 ${NAME}.lammpstrj id type x y z ix iy iz vx vy vz

# configure output of system property data
thermo_style custom step density temp press pe ke etotal
thermo 5 # output_interval

# run simulation
run 1000 # number_of_steps
write_restart ${NAME}.restart.*
