###################################################################
# This is a LAMMPS input file to run an NPT simulation of ethanol.
###################################################################
# User input information
variable        NAME index mol               # The prefix of the log and LAMMPS dump file names
log             ${NAME}.log
variable        infile index ethanol.data    # The name of the LAMMPS input data file
variable        mytemp index 298.00          # The simulation temperature in K
variable        mypress index 1.0            # The simulation pressure (for NpT) in atm

variable        xyzfreq index 1000           # The output frequency of coordinate information
variable        thermofreq index 1000        # The output frequency of property information
variable        simlength index 10000       # Simulation run length  (in timesteps)

variable        restartfreq index 5000       # The output frequency of restart files

# Properties to output
variable        density equal density
variable        temp equal temp
variable        press equal press
variable        ke equal ke
variable        pe equal pe
variable        etotal equal etotal
variable        enthalpy equal enthalpy
variable        lx equal lx
variable        ly equal ly
variable        lz equal lz

# Simulation settings
# the following information is saved to restart files
units           real
atom_style      full
boundary        p p p
pair_style      lj/cut/coul/long 12
kspace_style    ewald 0.0001
pair_modify     tail yes
pair_modify     mix arithmetic
special_bonds   lj/coul 0.0 0.0 0.5

bond_style      harmonic
angle_style     harmonic
dihedral_style  opls

read_data       ${infile}

neighbor        2.0 bin
neigh_modify    delay 0 every 1 check yes page 1000000 one 20000
timestep        1.0          # Time step in fs

## end information that is saved to restart files

## create velocity profile
velocity        all create  ${mytemp} 314159265 units box
velocity        all zero linear units box

thermo_style    custom step vol temp press ke pe etotal enthalpy evdwl ecoul epair ebond eangle edihed eimp emol elong etail lx ly lz xy xz yz density

###################
# NPT EQUILIBRATION
###################

# Create a trajectory file that PyLAT can read
dump            dump all custom ${xyzfreq} ${NAME}.npt.lammpstrj id type x y z mol

# Create an xyz file OVITO can read
dump            dumpxyz all xyz ${xyzfreq} ${NAME}.npt.xyz

# This command maps info from the data file to the atom type so that in the xyz file
# the proper element name is assigned allowing for OVITO to properly color the atoms
dump_modify     dumpxyz element C H O H C

# Tell LAMMPS to create a table of instantaneous properties for convenience.
# We can analyze this file without having to parse the log file
fix             aveprop all ave/time 1 1 ${thermofreq} v_density v_temp v_press v_ke v_pe v_etotal v_enthalpy v_lx v_ly v_lz file properties.npt.dat

# How often to collect thermo properties and print in log file
thermo          ${thermofreq}

# Run a short energy minimization to relax the system
minimize        1e-4 1e-6 10000 10000

# thermostat, barostat, and integrator
fix             NPT all npt temp ${mytemp} ${mytemp} 100.0 iso ${mypress} ${mypress} 100.0

# Write checkpoint files
restart         ${restartfreq} restart.${NAME}.1 restart.${NAME}.2

# Start the simulation
run             ${simlength}

##########################################
# WRITE LAST RESTART and DATAFILE TO DISK
##########################################

write_restart   restart.npt.${NAME}
write_data      restart.npt.data
